OPTI DIME 2 ELEM TRI3;
P1 = 0. 0.; P2 = 1. 0.;
P3 = 0. 1.;
N1 = 10;
N2 = 5;
L1 = P1 D N1 P2;
M1 = L1 TRAN P3 N2;

TRAC M1;

X1 X2 = COOR M1;
C1 = EXCO SCAL X1 SCAL NATURE DISCRET;

TRAC C1 M1;

OPTI SORT 'test_ChpoToChamno.avs';
SORT AVS M1 C1;
FIN;
