* Sur TRI3
OPTI DIME 2 ELEM TRI3;
P1 = 0. 0.;
P2 = 2. 0.;
P3 = 0. 1.;
N1 = 30;
N2 = 10;
L1 = P1 D N1 P2;
M1 = L1 TRANS N2 P3;
X1 = COOR 1 M1;

M2 = M1 TOUR 20. (BARY M1);

* TRAC (M1 ET M2);

OPTI SORT 'testdd3.avs';
SORT AVS M1 X1;
SORT AVS M2 SUIT;
FIN;
