* Sur TET4
OPTI DIME 2 ELEM TRI3;
P1 = 0. 0.;
P2 = 2. 0.;
P3 = 0. 1.;
N1 = 30;
N2 = 10;
N3 = 5;
L1 = P1 D N1 P2;
M1 = L1 TRANS N2 P3;
OPTI DIME 3 ELEM TET4;
P4 = 0. 0. 0.5;
MAIL1 = M1 VOLU TRAN N3 P4;
MAIL1 = MAIL1 CHAN TET4;
X1 = COOR 1 MAIL1;


Q1 = BARY MAIL1;
Q2 = 1.5 * Q1;
MAIL2 = MAIL1 TOUR 20. Q1 Q2;

* TRAC (MAIL1 ET (MAIL2 COUL JAUN)) CACH;

OPTI SORT 'testdd4.avs';
SORT AVS MAIL1 X1;
SORT AVS MAIL2 SUIT;
FIN;
